C := 0.27*10^-6
R_1 := 100*10^3
R_2 := 0.1*10^3
ω(f) := 2*π*f
X_c(f) := 1/(ω(f)*C)
R_o(f) := R_1*(-1i*X_c(f))/(R_1 - 1i*X_c(f))
A(f) := (R_o(f) + R_2)/R_2
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R1 := 1*10^6
R2 := 10*10^3
f_1 := 0.5
f_2 := 5
C2 := 1/(2*π*R2*f_2) = 3.1831e-6
C1 := 1/(2*π*R1*f_1) = 3.1831e-7
R_del := 250*10^3  # Ом
I_omax := 2.4*10^-6
f_p := 25000
I_1 := 1.5/R_del = 6e-6  # А
R1 := (1.8 - 0)/I_omax = 750000
I_оу := 25*10^-6  # А
I_потр := I_оу*3 + I_1
It := 500*10^-3  # мА*ч
C_1 := 1/(2*π*R_1*f_p) = 6.3662e-11
t := 14*24 = 336  # ч
Q := I_потр*t = 0.027216  # мА*ч
end := Q/It = 5.4432 %
